*Heading
** Job name: 000_Duretz_et_al_2021_12340elements_shear_heating_10deg_dil_longer Model name: 000_Duretz_et_al_2021_12340elements_shear_heating_10deg_dil_longer
** Generated by: Abaqus/CAE 2019
*Preprint, echo=NO, model=NO, history=NO, contact=NO
**
** PARTS
**
*Part, name=Planar
*End Part
**
**
** ASSEMBLY
**
*Assembly, name=Assembly
**
*Instance, name=Planar-1, part=Planar
*Node
      1,     -204800.,      896600.
      2,     -104800.,      896600.
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*Element, type=CPE3T
    1, 1640,  365,    6
    2, 1659,  364, 1640
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*Nset, nset=Matrix, generate
    1,  6339,     1
*Elset, elset=Matrix, generate
     1,  12298,      1
*Nset, nset=Inclusion
    5,  366,  367,  368,  369,  370
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*Elset, elset=Inclusion, generate
 12299,  12340,      1
*Nset, nset=EntireGeometry, generate
    1,  6353,     1
*Elset, elset=EntireGeometry, generate
     1,  12340,      1
** Section: Matrix
*Solid Section, elset=Matrix, material=Matrix
,
** Section: Inclusion
*Solid Section, elset=Inclusion, material=Inclusion
,
*End Instance
**
*Elset, elset=AllElements, instance=Planar-1, generate
     1,  12340,      1
*Nset, nset=AllNodes, instance=Planar-1, generate
    1,  6353,     1
*Nset, nset=BottomBoundary, instance=Planar-1
   1,   2,   6,   7,   8,   9
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*Elset, elset=BottomBoundary, instance=Planar-1
   45,   67,   89,  111,  133,  177
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*Nset, nset=EntireGeometry, instance=Planar-1, generate
    1,  6353,     1
*Elset, elset=EntireGeometry, instance=Planar-1, generate
     1,  12340,      1
*Nset, nset=Inclusion, instance=Planar-1
    5,  366,  367,  368,  369,  370
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*Elset, elset=Inclusion, instance=Planar-1, generate
 12299,  12340,      1
*Elset, elset=InclusionElement, instance=Planar-1
 12340,
*Nset, nset=LeftBoundary, instance=Planar-1
   1,   4, 306, 307, 308, 309
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*Elset, elset=LeftBoundary, instance=Planar-1
    5,   13,   14,   17,   20, 1481
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*Nset, nset=LeftandRight, instance=Planar-1
   1,   2,   3,   4, 126, 127
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*Elset, elset=LeftandRight, instance=Planar-1
    5,   13,   14,   17,   20, 1409
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*Elset, elset=MatrixElement, instance=Planar-1
 6292,
*Nset, nset=RightBoundary, instance=Planar-1
   2,   3, 126, 127, 128, 129
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*Elset, elset=RightBoundary, instance=Planar-1
 1409, 1419, 1422, 1434, 1485, 1680
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*Elset, elset=ShearBandElement, instance=Planar-1
 8410,
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*Elset, elset=_AllSurfaces_S2, internal, instance=Planar-1
    5,   13,   14,   17,   20,   43
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*Elset, elset=_AllSurfaces_S1, internal, instance=Planar-1
 2692, 2693, 2734, 2789
*Surface, type=ELEMENT, name=AllSurfaces
_AllSurfaces_S2, S2
_AllSurfaces_S1, S1
*Elset, elset=_BottomSurface_S2, internal, instance=Planar-1
   45,   67,   89,  111,  133,  177
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*Elset, elset=_BottomSurface_S1, internal, instance=Planar-1
 2692,
*Surface, type=ELEMENT, name=BottomSurface
_BottomSurface_S2, S2
_BottomSurface_S1, S1
*Elset, elset=_LeftSurface_S2, internal, instance=Planar-1
    5,   13,   14,   17,   20, 1481
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*Elset, elset=_LeftSurface_S1, internal, instance=Planar-1
 2789,
*Surface, type=ELEMENT, name=LeftSurface
_LeftSurface_S2, S2
_LeftSurface_S1, S1
*Elset, elset=_LeftandRight_S2, internal, instance=Planar-1
    5,   13,   14,   17,   20, 1409
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*Elset, elset=_LeftandRight_S1, internal, instance=Planar-1
 2693, 2789
*Surface, type=ELEMENT, name=LeftandRight
_LeftandRight_S2, S2
_LeftandRight_S1, S1
*Elset, elset=_RightSurface_S2, internal, instance=Planar-1
 1409, 1419, 1422, 1434, 1485, 1680
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*Elset, elset=_RightSurface_S1, internal, instance=Planar-1
 2693,
*Surface, type=ELEMENT, name=RightSurface
_RightSurface_S2, S2
_RightSurface_S1, S1
*Elset, elset=_TopSurface_S2, internal, instance=Planar-1
   43,   65,   87,  153,  175,  197
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*Elset, elset=_TopSurface_S1, internal, instance=Planar-1
 2734,
*Surface, type=ELEMENT, name=TopSurface
_TopSurface_S2, S2
_TopSurface_S1, S1
*End Assembly
*Amplitude, name=CompressionAmp, time=TOTAL TIME
             0.,              1., 80801600000000.,              1.
*Amplitude, name=GravityAmp, time=TOTAL TIME
             0.,              1.,              1.,              1.
*Amplitude, name=Vx
             0.,              1., 80801600000000.,              1.
*Amplitude, name=Vy
             0.,              1., 80801600000000.,              1.
**
** MATERIALS
**
*Material, name=Inclusion
*Density
2700.,
*Depvar
     28,
*User Material, constants=18, type=MECHANICAL
 7.5e+10,    0.25, 100000.,      0.,      1.,      0.,      0.,   2700.
   1050.,      0.,    8.31,   1e-20,   1e+15,     10.,    273., 3.5e-05
   0.005,   0.035
*User Material, constants=3, type=THERMAL
 2.5,1050.,2700.
*Material, name=Matrix
*Density
2700.,
*Depvar
     28,
*User Material, constants=18, type=MECHANICAL
 7.5e+10,       0.25,      5e+07,         0.,        3.3,        30.,        30.,      2700.
      1050.,    186500.,       8.31, 3.1623e-26,      1e+15,        10.,       273.,    3.5e-05
      0.005,      0.035
*User Material, constants=3, type=THERMAL
 2.5,1050.,2700.
**
** BOUNDARY CONDITIONS
**
** Name: Fixed4GravBottom Type: Velocity/Angular velocity
*Boundary, type=VELOCITY
BottomBoundary, 2, 2
** Name: Fixed4GravLR Type: Velocity/Angular velocity
*Boundary, type=VELOCITY
LeftandRight, 1, 1
**
** PREDEFINED FIELDS
**
** Name: TemperatureGradient   Type: Temperature
*Initial Conditions, type=TEMPERATURE, file=C:\Users\kees1\OneDrive\Documents\PostDoc\AbaqusSimulations\Duretz2021POF\000_Duretz_et_al_2020_TEMP.odb, step=1, inc=1000, interpolate
** ----------------------------------------------------------------
**
** STEP: GravityLoad
**
*Step, name=GravityLoad, nlgeom=YES
*Coupled Temperature-displacement, creep=none, deltmx=1e+21, stabilize=0.0002, allsdtol=0.05, continue=NO
1., 1., 1., 1.
**
** LOADS
**
** Name: Gravity   Type: Gravity
*Dload, amplitude=GravityAmp
EntireGeometry, GRAV, 10., 0., -1.
** Name: ZeroTraction   Type: Surface traction
*Dsload, amplitude=CompressionAmp
AllSurfaces, TRSHR, 1e-99, 1., 0., 0.
**
** OUTPUT REQUESTS
**
*Restart, write, frequency=0
**
** FIELD OUTPUT: GravityLoad
**
*Output, field
*Node Output
NT, U, V
*Element Output, directions=YES
BF, E, EE, ER, ESDV, GRAV, IE, LE, MISES, MISESONLY, NE, P, S, SDV, TEMP
*Contact Output
CSTRESSERI,
*Radiation Output
FTEMP,
**
** HISTORY OUTPUT: InclusionElementGRAV
**
*Output, history
*Element Output, elset=InclusionElement
E11, E12, E13, E22, E23, E33, EP, INV3, PRESS, S11, S12, S13, S22, S23, S33, SDV
SP, TEMP, TRESC
**
** HISTORY OUTPUT: MatrixElementGRAV
**
*Element Output, elset=MatrixElement
E11, E12, E13, E22, E23, E33, EP, INV3, PRESS, S11, S12, S13, S22, S23, S33, SDV
SP, TEMP, TRESC
**
** HISTORY OUTPUT: ShearBandElementGRAV
**
*Element Output, elset=ShearBandElement
E11, E12, E13, E22, E23, E33, EP, INV3, PRESS, S11, S12, S13, S22, S23, S33, SDV
SP, TEMP, TRESC
*End Step
** ----------------------------------------------------------------
**
** STEP: Compress
**
*Step, name=Compress, nlgeom=YES, inc=1000000
*Coupled Temperature-displacement, creep=none, deltmx=1e+13, stabilize=0.0002, allsdtol=0.05, continue=NO
1e-20, 8.08016e+13, 1e-20, 8.08016e+13
**
** BOUNDARY CONDITIONS
**
** Name: CompressLeftBoundary Type: Velocity/Angular velocity
*Boundary, op=NEW, amplitude=Vx, type=VELOCITY
LeftBoundary, 1, 1, 5e-11
** Name: CompressRightBoundary Type: Velocity/Angular velocity
*Boundary, op=NEW, amplitude=Vx, type=VELOCITY
RightBoundary, 1, 1, -5e-11
** Name: ExtendBottomBoundary Type: Velocity/Angular velocity
*Boundary, op=NEW, amplitude=Vy, type=VELOCITY
BottomBoundary, 2, 2, -1.5e-11
** Name: Fixed4GravBottom Type: Velocity/Angular velocity
*Boundary, op=NEW
** Name: Fixed4GravLR Type: Velocity/Angular velocity
*Boundary, op=NEW
**
** LOADS
**
** Name: AdiabaticSides   Type: Surface heat flux
*Dsflux, amplitude=CompressionAmp
AllSurfaces, S, 1e-99
** Name: Gravity   Type: Gravity
*Dload, amplitude=GravityAmp
EntireGeometry, GRAV, 10., 0., -1.
**
** CONTROLS
**
*Controls, reset
*Controls, parameters=time incrementation
, , , , , , , 52, , ,
**
** OUTPUT REQUESTS
**
*Restart, write, frequency=0
**
** FIELD OUTPUT: Compress, GravityLoad
**
*Output, field
*Node Output
NT, U, V
*Element Output, directions=YES
BF, E, EE, ER, ESDV, GRAV, IE, LE, MISES, MISESONLY, NE, P, S, SDV, TEMP
*Contact Output
CSTRESSERI,
*Radiation Output
FTEMP,
**
** HISTORY OUTPUT: InclusionElement, InclusionElementGRAV
**
*Output, history
*Element Output, elset=InclusionElement
E11, E12, E13, E22, E23, E33, EP, INV3, PRESS, S11, S12, S13, S22, S23, S33, SDV
SP, TEMP, TRESC
**
** HISTORY OUTPUT: MatrixElement, MatrixElementGRAV
**
*Element Output, elset=MatrixElement
E11, E12, E13, E22, E23, E33, EP, INV3, PRESS, S11, S12, S13, S22, S23, S33, SDV
SP, TEMP, TRESC
**
** HISTORY OUTPUT: ShearBandElement, ShearBandElementGRAV
**
*Element Output, elset=ShearBandElement
E11, E12, E13, E22, E23, E33, EP, INV3, PRESS, S11, S12, S13, S22, S23, S33, SDV
SP, TEMP, TRESC
*End Step
