*Heading
** Job name: 000_Duretz_et_al_2014_R_EQ_3km_200by100cells_VP Model name: 000_Duretz_et_al_2014_R_EQ_3km_200by100cells_VP
** Generated by: Abaqus/CAE 2019
*Preprint, echo=NO, model=NO, history=NO, contact=NO
**
** PARTS
**
*Part, name=Planar
*End Part
**
**
** ASSEMBLY
**
*Assembly, name=Assembly
**
*Instance, name=Planar-1, part=Planar
*Node
      1,  -136804.938,      896600.
      2,   -142805.25,      896600.
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*Element, type=CPE3T
  1, 623,  25,  26
  2, 628,  33,  34
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*Nset, nset=Inclusion
   1,   2,   7,   8,   9,  10
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*Elset, elset=Inclusion, generate
   1,  113,    1
*Nset, nset=EntireGeometry, generate
     1,  10477,      1
*Elset, elset=EntireGeometry, generate
     1,  20350,      1
*Nset, nset=Matrix
     1,     2,     3,     4,     5,     6
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*Elset, elset=Matrix, generate
   114,  20350,      1
** Section: Inclusion
*Solid Section, elset=Inclusion, material=Inclusion
,
** Section: Matrix
*Solid Section, elset=Matrix, material=Matrix
,
*End Instance
**
*Elset, elset=AllElements, instance=Planar-1, generate
     1,  20350,      1
*Nset, nset=AllNodes, instance=Planar-1, generate
     1,  10477,      1
*Nset, nset=BottomBoundary, instance=Planar-1
   1,   2,   3,   6,  24,  25
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*Elset, elset=BottomBoundary, instance=Planar-1
    1,    2,    4,    6,    9,   15
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*Nset, nset=EntireGeometry, instance=Planar-1, generate
     1,  10477,      1
*Elset, elset=EntireGeometry, instance=Planar-1, generate
     1,  20350,      1
*Nset, nset=Inclusion, instance=Planar-1
   1,   2,   7,   8,   9,  10
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*Elset, elset=Inclusion, instance=Planar-1, generate
   1,  113,    1
*Elset, elset=InclusionElement, instance=Planar-1
 100,
*Nset, nset=LeftBoundary, instance=Planar-1
   5,   6, 430, 431, 432, 433
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*Elset, elset=LeftBoundary, instance=Planar-1
 1052, 1134, 1161, 1188, 1204, 1364
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*Elset, elset=MatrixElement, instance=Planar-1
 19235,
*Elset, elset=NearWeakZone, instance=Planar-1
 14356,
*Nset, nset=RightBoundary, instance=Planar-1
   3,   4, 131, 132, 133, 134
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*Elset, elset=RightBoundary, instance=Planar-1
  194,  196,  250,  280,  301,  408
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*Elset, elset=ShearBandElement, instance=Planar-1
 9317,
*Nset, nset=Top_Surface, instance=Planar-1
   4,   5, 230, 231, 232, 233
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*Elset, elset=Top_Surface, instance=Planar-1
  166,  540,  623,  694,  843,  857
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*Elset, elset=_BottomSurface_S2, internal, instance=Planar-1
    1,    2,    4,    6,    9,   15
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*Elset, elset=_BottomSurface_S1, internal, instance=Planar-1
   18, 5158, 5340, 5527
*Elset, elset=_BottomSurface_S3, internal, instance=Planar-1
   29,  392, 1684, 1702, 5147, 5333
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*Surface, type=ELEMENT, name=BottomSurface
_BottomSurface_S2, S2
_BottomSurface_S1, S1
_BottomSurface_S3, S3
*Elset, elset=_LeftRightTopBottom_S2, internal, instance=Planar-1
    1,    2,    4,    6,    9,   15
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*Elset, elset=_LeftRightTopBottom_S1, internal, instance=Planar-1
   18,  541,  782,  947, 1546, 1716
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*Elset, elset=_LeftRightTopBottom_S3, internal, instance=Planar-1
   29,  392,  408,  587,  815,  843
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*Surface, type=ELEMENT, name=LeftRightTopBottom
_LeftRightTopBottom_S2, S2
_LeftRightTopBottom_S1, S1
_LeftRightTopBottom_S3, S3
*Elset, elset=_LeftSurface_S2, internal, instance=Planar-1
 1052, 1134, 1161, 1188, 1204, 1364
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*Elset, elset=_LeftSurface_S1, internal, instance=Planar-1
 1546, 1716, 5274, 5305, 6064
*Elset, elset=_LeftSurface_S3, internal, instance=Planar-1
 1580, 1704, 5275, 5939, 6035
*Surface, type=ELEMENT, name=LeftSurface
_LeftSurface_S2, S2
_LeftSurface_S1, S1
_LeftSurface_S3, S3
*Elset, elset=_LeftandRight_S2, internal, instance=Planar-1
  194,  196,  250,  280,  301,  609
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*Elset, elset=_LeftandRight_S3, internal, instance=Planar-1
  408,  587,  815,  935, 1580, 1704, 5275, 5881, 5892, 5939, 5979, 6035
*Elset, elset=_LeftandRight_S1, internal, instance=Planar-1
  541,  782,  947, 1546, 1716, 5159, 5274, 5305, 6064
*Surface, type=ELEMENT, name=LeftandRight
_LeftandRight_S2, S2
_LeftandRight_S3, S3
_LeftandRight_S1, S1
*Elset, elset=_RightSurface_S2, internal, instance=Planar-1
  194,  196,  250,  280,  301,  609
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*Elset, elset=_RightSurface_S3, internal, instance=Planar-1
  408,  587,  815,  935, 5881, 5892, 5979
*Elset, elset=_RightSurface_S1, internal, instance=Planar-1
  541,  782,  947, 5159
*Surface, type=ELEMENT, name=RightSurface
_RightSurface_S2, S2
_RightSurface_S3, S3
_RightSurface_S1, S1
*Elset, elset=_TopSurface_S2, internal, instance=Planar-1
  166,  540,  623,  694,  857,  893
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*Elset, elset=_TopSurface_S3, internal, instance=Planar-1
  843, 1097, 1107, 1111, 5616, 5625
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*Elset, elset=_TopSurface_S1, internal, instance=Planar-1
 5198, 5201, 5224, 5250, 5663, 5675, 5684, 5699, 5803, 5806, 5821
*Surface, type=ELEMENT, name=TopSurface
_TopSurface_S2, S2
_TopSurface_S3, S3
_TopSurface_S1, S1
*End Assembly
*Amplitude, name=CompressionAmp
             0.,              1.,  5000000000000.,              1.
*Amplitude, name=GravityAmp, time=TOTAL TIME
             0.,              1., 100000000000000.,              1.
*Amplitude, name=Vx, time=TOTAL TIME
             0.,              1.,  5000000000000.,            0.75
*Amplitude, name=Vy
             0.,              1.,  5000000000000.,            1.25
**
**
** MATERIALS
**
*Material, name=Inclusion
*Density
2700.,
*Depvar
     28,
*User Material, constants=18, type=MECHANICAL
 7.5e+10,    0.25, 100000.,      0.,      1.,      0.,      0.,   2700.
   1050.,      0.,    8.31,   1e-20,   1e+15,     10.,    273., 3.5e-05
   0.005,   0.035
*User Material, constants=3, type=THERMAL
 2.5,1050.,2700.
*Material, name=Matrix
*Density
2700.,
*Depvar
     28,
*User Material, constants=18, type=MECHANICAL
 7.5e+10,       0.25,      5e+07,         0.,        3.3,        30.,        30.,      2700.
      1050.,    186500.,       8.31, 3.1623e-26,      1e+15,        10.,       273.,    3.5e-05
      0.005,      0.035
*User Material, constants=3, type=THERMAL
 2.5,1050.,2700.
**
** BOUNDARY CONDITIONS
**
** Name: FixedBottomBoundary Type: Velocity/Angular velocity
*Boundary, type=VELOCITY
BottomBoundary, 2, 2
**
** PREDEFINED FIELDS
**
** Name: TemperatureGradient   Type: Temperature
*Initial Conditions, type=TEMPERATURE
Planar-1.EntireGeometry, 473.
** ----------------------------------------------------------------
**
** STEP: Compress
**
*Step, name=Compress, nlgeom=YES, inc=1000000
*Coupled Temperature-displacement, creep=none, deltmx=1e+13, stabilize=0.0002, allsdtol=0.05, continue=NO
1e-14, 4e+12, 1e-14, 4e+12
**
** BOUNDARY CONDITIONS
**
** Name: CompressLeftBoundary Type: Velocity/Angular velocity
*Boundary, amplitude=Vx, type=VELOCITY
LeftBoundary, 1, 1, 1.75e-09
** Name: CompressRightBoundary Type: Velocity/Angular velocity
*Boundary, amplitude=Vx, type=VELOCITY
RightBoundary, 1, 1, -1.75e-09
** Name: ExtendTopBoundary Type: Velocity/Angular velocity
*Boundary, amplitude=Vy, type=VELOCITY
Top_Surface, 2, 2, 2e-09
**
** LOADS
**
** Name: AdiabaticSides   Type: Surface heat flux
*Dsflux, amplitude=CompressionAmp
LeftRightTopBottom, S, 1e-99
** Name: ZeroTraction   Type: Surface traction
*Dsload, amplitude=CompressionAmp
LeftRightTopBottom, TRSHR, 1e-99, 0.868243, 0.496139, 0.
**
** CONTROLS
**
*Controls, reset
*Controls, parameters=time incrementation
, , , , , , , 52, , ,
**
** OUTPUT REQUESTS
**
*Restart, write, frequency=0
**
** FIELD OUTPUT: Compress
**
*Output, field
*Node Output
NT, U, V
*Element Output, directions=YES
BF, E, EE, ER, ESDV, GRAV, IE, LE, MISES, MISESONLY, NE, P, S, SDV, TEMP
*Radiation Output
FTEMP,
*Contact Output
CSTRESSERI,
**
** HISTORY OUTPUT: InclusionElement
**
*Output, history
*Element Output, elset=InclusionElement
E11, E12, E13, E22, E23, E33, EP, INV3, PRESS, S11, S12, S13, S22, S23, S33, SDV
SP, TEMP, TRESC
**
** HISTORY OUTPUT: MatrixElement
**
*Element Output, elset=MatrixElement
E11, E12, E13, E22, E23, E33, EP, INV3, PRESS, S11, S12, S13, S22, S23, S33, SDV
SP, TEMP, TRESC
**
** HISTORY OUTPUT: NearInclusionElement
**
*Element Output, elset=NearWeakZone
E11, E12, E13, E22, E23, E33, EP, INV3, PRESS, S11, S12, S13, S22, S23, S33, SDV
SP, TEMP, TRESC
**
** HISTORY OUTPUT: ShearBandElement
**
*Element Output, elset=ShearBandElement
E11, E12, E13, E22, E23, E33, EP, INV3, PRESS, S11, S12, S13, S22, S23, S33, SDV
SP, TEMP, TRESC
*End Step
