*Heading
** Job name: 005AA_large_scale_compression_top_and_botom_temp_OC Model name: 005AA_large_scale_compression_top_and_bottom_temp_OC
** Generated by: Abaqus/CAE 2019
*Preprint, echo=NO, model=NO, history=NO, contact=NO
**
** PARTS
**
*Part, name=Planar
*End Part
**
**
** ASSEMBLY
**
*Assembly, name=Assembly
**
*Instance, name=Planar-1, part=Planar
*Node
      1,     -104800.,     1184600.
      2,    -1104800.,     1184600.
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*Element, type=CPE3T
    1,  969,    9,  966
    2, 2449, 2177, 1893
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*Nset, nset=EntireGeometry, generate
    1,  6532,     1
*Elset, elset=EntireGeometry, generate
     1,  12734,      1
*Nset, nset=Mantle
    1,    2,    3,    4,    5,    8
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*Elset, elset=Mantle, generate
     1,  10430,      1
*Nset, nset=Crust
    1,    2,    6,    7,    8,    9
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*Elset, elset=Crust, generate
 10431,  12548,      1
*Nset, nset=WeakShearZone
    5,  322,  323,  324,  325,  326
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*Elset, elset=WeakShearZone, generate
 12549,  12734,      1
*Elset, elset=_BottomBoundary_S3, internal
 17,
*Elset, elset=_BottomBoundary_S2, internal
    19,    42,    50,    58,    62,    66,   373, 10389, 10401, 10407, 10421, 10426, 10427, 10430
*Elset, elset=_BottomBoundary_S1, internal
 374, 377
*Surface, type=ELEMENT, name=BottomBoundary
_BottomBoundary_S3, S3
_BottomBoundary_S2, S2
_BottomBoundary_S1, S1
*Elset, elset=_LeftBoundary_S2, internal
 11107, 11258, 11264, 11266
*Elset, elset=_LeftBoundary_S1, internal
 11252,
*Surface, type=ELEMENT, name=LeftBoundary
_LeftBoundary_S2, S2
_LeftBoundary_S1, S1
*Elset, elset=_RightBoundary_S2, internal
 10955, 11256, 11260, 11262
*Elset, elset=_RightBoundary_S1, internal
 11104,
*Surface, type=ELEMENT, name=RightBoundary
_RightBoundary_S2, S2
_RightBoundary_S1, S1
*Elset, elset=_TopSurface_S3, internal
 10432, 10506, 10815, 10823, 10827, 10839, 10847, 10863, 10867
*Elset, elset=_TopSurface_S2, internal
 10442, 10463, 10464, 10465, 10472, 10474
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*Elset, elset=_TopSurface_S1, internal
 10519, 10530, 10922, 10939, 10947, 10951
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*Surface, type=ELEMENT, name=TopSurface
_TopSurface_S3, S3
_TopSurface_S2, S2
_TopSurface_S1, S1
** Section: Mantle
*Solid Section, elset=Mantle, material=Mantle
,
** Section: Crust
*Solid Section, elset=Crust, material=Crust
,
** Section: WeakShearZone
*Solid Section, elset=WeakShearZone, material=WeakShearZone
,
*End Instance
**
*Elset, elset=AllElements, instance=Planar-1, generate
     1,  12734,      1
*Nset, nset=AllNodes, instance=Planar-1, generate
    1,  6532,     1
*Nset, nset=BottomBoundary, instance=Planar-1
   3,   4, 295, 296, 297, 298
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*Elset, elset=BottomBoundary, instance=Planar-1
    17,    19,    42,    50,    58,    62
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*Elset, elset=CrustalElement, instance=Planar-1
 12108,
*Nset, nset=EntireGeometry, instance=Planar-1, generate
    1,  6532,     1
*Elset, elset=EntireGeometry, instance=Planar-1, generate
     1,  12734,      1
*Nset, nset=LeftBoundary, instance=Planar-1
   2,   3,   7, 284, 285, 286
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*Elset, elset=LeftBoundary, instance=Planar-1
    15,   364,   369,   373,  1004,  1010
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*Nset, nset=LeftandRightBoundary, instance=Planar-1
   1,   2,   3,   4,   6,   7
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*Elset, elset=LeftandRightBoundary, instance=Planar-1
    15,    74,   364,   369,   373,   379
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*Nset, nset=Mantle, instance=Planar-1
    1,    2,    3,    4,    5,    8
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*Elset, elset=Mantle, instance=Planar-1, generate
     1,  10430,      1
*Elset, elset=MantleElement, instance=Planar-1
 9358,
*Nset, nset=PushLeft, instance=Planar-1
   2,   3,   7, 284, 285, 286
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*Elset, elset=PushLeft, instance=Planar-1
    15,   364,   369,   373,  1004,  1010
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*Nset, nset=RightBoundary, instance=Planar-1
   1,   4,   6, 311, 312, 313
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*Elset, elset=RightBoundary, instance=Planar-1
    74,   379,   387,   982,  1006,  1009
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*Nset, nset=Top_Surface, instance=Planar-1
   6,   7, 361, 362, 363, 364
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*Elset, elset=Top_Surface, instance=Planar-1
 10432, 10442, 10463, 10464, 10465, 10472
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*Elset, elset=WeakElement, instance=Planar-1
 12730,
*Elset, elset=_BottomSurface_S3, internal, instance=Planar-1
 17,
*Elset, elset=_BottomSurface_S2, internal, instance=Planar-1
    19,    42,    50,    58,    62,    66,   373, 10389, 10401, 10407, 10421, 10426, 10427, 10430
*Elset, elset=_BottomSurface_S1, internal, instance=Planar-1
 374, 377
*Surface, type=ELEMENT, name=BottomSurface
_BottomSurface_S3, S3
_BottomSurface_S2, S2
_BottomSurface_S1, S1
*Elset, elset=_LeftSurface_S2, internal, instance=Planar-1
    15,   364,   369,  1004,  1010,  1014,  1020,  1022,  1632,  1633,  1634, 11107, 11258, 11264, 11266
*Elset, elset=_LeftSurface_S1, internal, instance=Planar-1
   373, 11252
*Surface, type=ELEMENT, name=LeftSurface
_LeftSurface_S2, S2
_LeftSurface_S1, S1
*Elset, elset=_LeftandRight_S2, internal, instance=Planar-1
    15,    74,   364,   369,   387,   982
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*Elset, elset=_LeftandRight_S1, internal, instance=Planar-1
   373,   379, 11104, 11252
*Surface, type=ELEMENT, name=LeftandRight
_LeftandRight_S2, S2
_LeftandRight_S1, S1
*Elset, elset=_RightSurface_S2, internal, instance=Planar-1
    74,   387,   982,  1006,  1009,  1013,  1017,  1019,  1025,  1630,  2867, 10955, 11256, 11260, 11262
*Elset, elset=_RightSurface_S1, internal, instance=Planar-1
   379, 11104
*Surface, type=ELEMENT, name=RightSurface
_RightSurface_S2, S2
_RightSurface_S1, S1
*Elset, elset=_TopSurface_S3, internal, instance=Planar-1
 10432, 10506, 10815, 10823, 10827, 10839, 10847, 10863, 10867
*Elset, elset=_TopSurface_S2, internal, instance=Planar-1
 10442, 10463, 10464, 10465, 10472, 10474
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*Elset, elset=_TopSurface_S1, internal, instance=Planar-1
 10519, 10530, 10922, 10939, 10947, 10951
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*Surface, type=ELEMENT, name=TopSurface
_TopSurface_S3, S3
_TopSurface_S2, S2
_TopSurface_S1, S1
*End Assembly
*Amplitude, name=CompressionAmp, time=TOTAL TIME
             0.,              1., 315600000000000.,              1.
*Amplitude, name=GravityAmp, time=TOTAL TIME
             0.,              1., 100000000000000.,              1.
**
**
** MATERIALS
**
**********************************************************************************************************************
**********************************************************************************************************************
*Material, name=Mantle
*Density
 3300.
*Depvar
     28,
*User Material, constants=18, type=MECHANICAL
**E=PROPS(1)  v=PROPS(2)  c_0=PROPS(3)  H=PROPS(4)  PWR=PROPS(5)  phi_i=PROPS(6)    phi_f=PROPS(7)   RHOD_REF=PROPS(8)
**Young's     Poisson's   Initial       Hardening   Stress        Initial friction  Final friction   Reference
**modulus     ratio       cohesion      modulus     exponent      angle             angle            density
 25e+09,      0.25,       1e+06,        5e+06,      3.5,          23.6,             30.,             3300.
**C_P=PROPS(9)  E_A=PROPS(10) R=PROPS(11)     A=PROPS(12)      1/MU=PROPS(13)       psi=PROPS(14)    TREF=PROPS(15)
**Specific heat Activation    Molecular gas   Pre-exponential  Relative VP strain   Dilatancy        Reference
**capacity      energy        constant        constants        rate                 angle            temperature
  1050.,        535000.,      8.31,           2e-21,        1e15,                10.,             280.
**ALPH_LE=PROPS(16)   EPSILON_BAR_C=PROPS(17)                  MUN=PROPS(18)
** Linear expansion   Critical effective plastic strain        Viscosity-related parameter
   3.5e-05,           0.005,                                   10e-16
*User Material, constants=3, type=THERMAL
** Thermal        Specific         Density
** conductivity   heat capacity
   3.,           1050.,           3300.
**********************************************************************************************************************
**********************************************************************************************************************
*Material, name=Crust
*Density
 2950.
*Depvar
     28,
*User Material, constants=18, type=MECHANICAL
**E=PROPS(1)  v=PROPS(2)  c_0=PROPS(3)  H=PROPS(4)  PWR=PROPS(5)  phi_i=PROPS(6)     phi_f=PROPS(7)   RHOD_REF=PROPS(8)
**Young's     Poisson's   Initial       Hardening   Stress        Initial friction   Final friction   Reference
**modulus     ratio       cohesion      modulus     exponent      angle              angle            density
 25e+09,      0.25,       1e+06,        5e+06,      2.3,          23.6,              30.,             2950.
**C_P=PROPS(9)  E_A=PROPS(10) R=PROPS(11)     A=PROPS(12)      1/MU=PROPS(13)        psi=PROPS(14)    TREF=PROPS(15)
**Specific heat Activation    Molecular gas   Pre-exponential  Relative VP strain    Dilatancy        Reference
**capacity      energy        constant        constants        rate                  angle            temperature
    1050.,      154000.,      8.31,           1.59e-14,        1e15,                 10.,             280.
**ALPH_LE=PROPS(16)   EPSILON_BAR_C=PROPS(17)              MUN=PROPS(18)
** Linear expansion   Critical effective plastic strain    Viscosity-related parameter
   3.5e-05,           0.005,                               10e-16
*User Material, constants=3, type=THERMAL
** Thermal        Specific         Density
** conductivity   heat capacity
 3.,             1050.,           2950.
**********************************************************************************************************************
**********************************************************************************************************************
*Material, name=WeakShearZone
*Density
 3100.
*Depvar
     28,
*User Material, constants=18, type=MECHANICAL
**E=PROPS(1)  v=PROPS(2)  c_0=PROPS(3)  H=PROPS(4)  PWR=PROPS(5)  phi_i=PROPS(6)     phi_f=PROPS(7)   RHOD_REF=PROPS(8)
**Young's     Poisson's   Initial       Hardening   Stress        Initial friction   Final friction   Reference
**modulus     ratio       cohesion      modulus     exponent      angle              angle            density
 25e+09,      0.25,       1e+06,        5e+06,      4.,            2.9,               30.,             3100.
**C_P=PROPS(9)  E_A=PROPS(10) R=PROPS(11)     A=PROPS(12)      1/MU=PROPS(13)       psi=PROPS(14)    TREF=PROPS(15)
**Specific heat Activation    Molecular gas   Pre-exponential  Relative VP strain    Dilatancy        Reference
**capacity      energy        constant        constants        rate                  angle            temperature
    1050.,      283000.,      8.31,           2.08e-23,        1e15,                 5.,              280.
**ALPH_LE=PROPS(16)   EPSILON_BAR_C=PROPS(17)              MUN=PROPS(18)
** Linear expansion   Critical effective plastic strain    Viscosity-related parameter
   3.5e-05,           0.005,                               10e-16
*User Material, constants=3, type=THERMAL
** Thermal        Specific         Density
** conductivity   heat capacity
   3.,           1050.,           3100.
**
**
**
**********************************************************************************************************************
**********************************************************************************************************************
**
**
** INTERACTION PROPERTIES
**
*Surface Interaction, name=IntProp-1
1.,
*Friction, slip tolerance=0.005
 0.3,
*Surface Behavior, penalty
**
** BOUNDARY CONDITIONS
**
** Name: Fixed4Grav Type: Velocity/Angular velocity
*Boundary, type=VELOCITY
LeftandRightBoundary, 1, 1
** Name: FixedBottom Type: Velocity/Angular velocity
*Boundary, type=VELOCITY
BottomBoundary, 2, 2
**
** PREDEFINED FIELDS
**
** Name: TemperatureGradient   Type: Temperature
*Initial Conditions, type=TEMPERATURE, file=/DATA/IPGP_PostDoc_Abaqus/010_large_scale_mod/005A_TEMP.odb, step=1, inc=57, interpolate
**
** INTERACTIONS
**
** Interaction: Int-1
*Contact Pair, interaction=IntProp-1, type=SURFACE TO SURFACE
TopSurface,
** ----------------------------------------------------------------
**
** STEP: Gravity
**
*Step, name=Gravity, nlgeom=YES
*Coupled Temperature-displacement, creep=none, deltmx=1e+21, stabilize, factor=0.0002, allsdtol=0.05, continue=NO
1., 1., 1., 1.
**
** LOADS
**
** Name: Gravity   Type: Gravity
*Dload, amplitude=CompressionAmp
EntireGeometry, GRAV, 9.8, 0., -1.
**
** OUTPUT REQUESTS
**
*Restart, write, frequency=0
**
** FIELD OUTPUT: Gravity
**
*Output, field
*Node Output
NT, U, V
*Element Output, directions=YES
BF, E, EE, ER, ESDV, GRAV, IE, LE, MISES, MISESONLY, NE, P, S, SDV, TEMP
*Radiation Output
FTEMP,
*Contact Output
CSTRESSERI,
**
** HISTORY OUTPUT: Gravity
**
*Output, history
*Radiation Output
FTEMP,
*Contact Output
CSTRESS, HTL
*End Step
** ----------------------------------------------------------------
**
** STEP: Compress
**
*Step, name=Compress, nlgeom=YES, inc=1000000
*Coupled Temperature-displacement, creep=none, deltmx=1e+13, stabilize=0.0002, allsdtol=0.05, continue=NO
1e-14, 3.1536e+14, 1e-14, 3.1536e+14
**
** BOUNDARY CONDITIONS
**
** Name: BottomTemp Type: Temperature
*Boundary, op=NEW
BottomBoundary, 11, 11, 1672.
** Name: CompressLeftBoundary Type: Velocity/Angular velocity
*Boundary, op=NEW, amplitude=CompressionAmp, type=VELOCITY
PushLeft, 1, 1, 6.342e-10
** Name: CompressRightBoundary Type: Velocity/Angular velocity
*Boundary, op=NEW, amplitude=CompressionAmp, type=VELOCITY
RightBoundary, 1, 1, -6.342e-10
** Name: Fixed4Grav Type: Velocity/Angular velocity
*Boundary, op=NEW
** Name: FixedBottom Type: Velocity/Angular velocity
*Boundary, op=NEW, type=VELOCITY
BottomBoundary, 2, 2
** Name: TopTemp Type: Temperature
*Boundary, op=NEW
Top_Surface, 11, 11, 273.
**
** LOADS
**
** Name: AdiabaticSides   Type: Surface heat flux
*Dsflux, amplitude=CompressionAmp
LeftandRight, S, 1e-99
**
** CONTROLS
**
*Controls, reset
*Controls, parameters=time incrementation
, , , , , , , 52, , ,
**
** OUTPUT REQUESTS
**
*Restart, write, frequency=0
**
** FIELD OUTPUT: Gravity
**
*Output, field
*Node Output
NT, U, V
*Element Output, directions=YES
BF, E, EE, ER, ESDV, GRAV, IE, LE, MISES, MISESONLY, NE, P, S, SDV, TEMP
*Radiation Output
FTEMP,
*Contact Output
CSTRESSERI,
**
** FIELD OUTPUT: Compress
**
*Output, field, frequency=20
*Node Output
NT, U, V
*Element Output, directions=YES
BF, E, EE, ER, ESDV, GRAV, IE, LE, MISES, MISESONLY, NE, P, S, SDV, TEMP
*Radiation Output
FTEMP,
*Contact Output
CSTRESSERI,
**
** HISTORY OUTPUT: Compress, Gravity
**
*Output, history
*Radiation Output
FTEMP,
*Contact Output
CSTRESS, HTL
**
** HISTORY OUTPUT: CrustalElement
**
*Element Output, elset=CrustalElement
E11, E12, E13, E22, E23, E33, PRESS, S11, S12, S13, S22, S23, S33, SDV, TEMP
**
** HISTORY OUTPUT: MantleElement
**
*Element Output, elset=MantleElement
E11, E12, E13, E22, E23, E33, PRESS, S11, S12, S13, S22, S23, S33, SDV, TEMP
**
** HISTORY OUTPUT: WeakElement
**
*Element Output, elset=WeakElement
E11, E12, E13, E22, E23, E33, PRESS, S11, S12, S13, S22, S23, S33, SDV, TEMP
*End Step
